### Define variables ###
# Numbers
variable L          equal 10.0  # Length of box
variable N          equal 10    # Number of atoms
variable ATOM_TYPES equal 1     # Number of atom types
variable SEED       equal 313   # Seed for random functions
variable MASS       equal 1.0   # Particle mass
variable TEMP       equal 1.5   # Temperature
variable DT         equal 0.001 # Time step
variable DUMP_STEPS equal 100   # Timesteps between every dump

# Strings
variable DUMP_FILE  string "dump.lammps" # Dump filename

### Define system ###
atom_style  atomic
timestep    ${DT}

# Create a box with sides 2L and center in the origin
region      REGION block -$L $L -$L $L -$L $L
create_box  ${ATOM_TYPES} REGION

create_atoms 1 random $N ${SEED} REGION # Fill the box with atoms
mass        1 ${MASS}                   # Give the atoms mass.
velocity    all create ${TEMP} ${SEED}  # Give the atoms velocity,
                                        # distributed around
                                        # one temperature.

fix 1 all nve   # Fix the system in the
                # microcanonical ensemble

### Run simulation ###
# Make a dump of system
dump DUMP all custom ${DUMP_STEPS} ${DUMP_FILE} id x y z vx vy vz
run 10000
