#############################################################################
# This input script runs the Müller-Plathe viscosity experiment.            #
# Structure is as follows:                                                  #
#   * First, some changeworthy parameters are defined.                      #
#       These are meant to be changed between simulation runs.              #
#   * Second, filenames are defined for log, dump, and fix files.           #
#       These are defined first so that everything                          #
#       after is included in the log files                                  #
#   * Third, variables are defined.                                         #
#   * Fourth, the system is set up, without any shear.                      #
#       This means a free pseudo-hard sphere gas.                           #
#   * Lastly, the experiment is defined and run.                            #
#       This step includes equilibration of the gas,                        #
#       and then the actual Müller-Plathe experiment.                       #
#############################################################################


# When running different simulations, change the
# following values, instead of editing the script below.
# The values are copied after filename definitions, and are
# thus included in the log file under a different name.
# The variable name used in the script (and log file)
# is commented for every value in the list.
# The log-name can be accessed from python, through function
# convert_LAMMPS_output.extract_constants_from_log().

# The following parameters are required on input:
#   - PACKING:          Volume packing fraction of the system.
#   - DIRECTORY:        Where to store the output data.
#   - HEAVY_FRACTION:   The portion of particles that are heavy/large.
#   - HEAVY_MASS:       The mass of the heavy particle.
#   - HEAVY_DIAMETER:   The diameter (sigma) of the heavy particle.

variable    EQUILLIBRATION_DURATION     equal 20  # Name -> RUN_TIME
variable    SIMULATION_DURATION         equal 100  # Name -> RUN_TIME
variable    TOTAL_NUMBER                equal 1000  # Name -> N

variable    HEAVY_NUMBER    equal ${TOTAL_NUMBER}*${HEAVY_FRACTION}
variable    LIGHT_NUMBER    equal ${TOTAL_NUMBER}-${HEAVY_NUMBER}

# Light component
variable    LIGHT_MASS      equal 1.0   # Name -> MASS
variable    LIGHT_DIAMETER  equal 1.0   # Name -> SIGMA

# Heavy component
#variable    HEAVY_MASS      equal 1.0   # Name -> MASS_H
#variable    HEAVY_DIAMETER  equal 2.0   # Name -> SIGMA_H


### ======================================================================== ###
###                               Define filenames                           ###
### ======================================================================== ###
# Files will have the structure
#   log.variable1_value1_value2.lammps
# For safety, consider swapping the period decimal with a dash.

variable N_STR      string N_${LIGHT_NUMBER}_${HEAVY_NUMBER}
variable S_STR      string sigma_${LIGHT_DIAMETER}_${HEAVY_DIAMETER}
variable M_STR      string mass_${LIGHT_MASS}_${HEAVY_MASS}
variable PF_STR     string pf_${PACKING}
variable FILENAME   string mp_${N_STR}_${S_STR}_${M_STR}_${PF_STR}  # Filename template

#variable FILENAME   string mix_mass-${LIGHT_MASS}-${HEAVY_MASS}_eta_${PACKING}  # Filename template
variable DIR        string data/${DIRECTORY}/               # Directory
variable DUMP_FILE  string ${DIR}dump.${FILENAME}.lammps    # Dump filename
variable LOG_FILE   string ${DIR}log.${FILENAME}.lammps     # Log filename
variable FIX_FILE   string ${DIR}fix.${FILENAME}.lammps  # Fix file

    ### Write out data to logfile ###
log     ${LOG_FILE}


### ======================================================================== ###
###                               Define variables                           ###
### ======================================================================== ###

## Numbers
# System-wide parameters
variable PF             equal ${PACKING}    # Packing fraction of the system
variable RAND_SEED      equal 999           # Seed for random functions
variable RAND_SEED_L    equal 313           # Seed for random functions
variable RAND_SEED_H    equal 666           # Seed for random functions
variable TEMP           equal 1.5           # Temperature
variable TDAMP          equal 100.0         # Damping constant for thermostat
                                            # determining how quickly the system
                                            # relaxes to desired temperature.

# Parameters defining atoms and interactions
variable ATOM_TYPES equal 2     # Number of atom types
variable EPSILON    equal 1.0   # Depth of the Mie potential. Should be 1.
variable MIE_REP    equal 50    # Repulsive exponent
variable MIE_ATT    equal 49    # Attractive exponent

# Parameters defining the two gas compounds
variable N          equal ${TOTAL_NUMBER}   # Number of atoms
variable N_L        equal ${LIGHT_NUMBER}   # Number of light atoms
variable N_H        equal ${HEAVY_NUMBER}   # Number of heavy atoms

variable MASS_L     equal ${LIGHT_MASS}     # Particle mass, light
variable MASS_H     equal ${HEAVY_MASS}     # Particle mass, heavy
variable SIGMA_L    equal ${LIGHT_DIAMETER} # Particle size, light
variable SIGMA_H    equal ${HEAVY_DIAMETER} # Particle size, heavy
variable SIGMA_LH   equal (${SIGMA_L}+${SIGMA_H})/2 # Average particle size


# Radius at which interaction potential is zero:
variable CUTOFF_L   equal ${MIE_REP}/${MIE_ATT}*${SIGMA_L}
variable CUTOFF_H   equal ${MIE_REP}/${MIE_ATT}*${SIGMA_H}
variable CUTOFF_LH  equal ${MIE_REP}/${MIE_ATT}*${SIGMA_LH}

# Length of box
variable Z_SCALE    equal 3.0   # Ratio LZ/LX, giving the height of the box.
variable Y_SCALE    equal 1.0   # Ratio LY/LX, giving the depth of the box.

variable LX         equal ((PI/(6*${Z_SCALE}*${Y_SCALE}*${PACKING})*(${N_L}*${SIGMA_L}^3+${N_H}*${SIGMA_H}^3))^(1/3)/2)

variable LY         equal (${Y_SCALE}*${LX})
variable LZ         equal (${Z_SCALE}*${LX})

# When minimizing system energy to avoid overlapping particles...
variable ETOL       equal 1e-4  # Max energy toleranze.
variable FTOL       equal 0.0   # Max force tolerance.
variable MAXITER    equal 1e4   # Max number of iterations.
variable MAXEVAL    equal 1e4   # Max number of force/energy evaluations

# Simulation and output parameters
# Length of simulation.
variable RUN_TIME       equal ${SIMULATION_DURATION}
# Time to equillibrate system.
variable EQUILL_TIME    equal ${EQUILLIBRATION_DURATION}

variable DT             equal 0.001                 # Time step
variable RUN_STEPS      equal ${RUN_TIME}/${DT}     # Number of time steps.
variable EQUILL_STEPS   equal ${EQUILL_TIME}/${DT}  # Number of time steps.
variable DUMP_STEPS     equal 10000                 # Timesteps between every dump
variable THERMO_OUTPUT  equal 100                   # Timesteps between thermo output

# Müller-Plathe experiment parameters
variable CHUNK_NUMBER       equal 20    # Number of chunks in MP experiment.
variable SWAP_NUMBER        equal 2     # Number of particles to swap every time.
#variable V_TARGET          equal INF   # Target velocity of slab boundaries.
variable CHUNK_WIDTH        equal 1     # This uses a dimensionless number.
variable CHUNK_THICKNESS    equal 1/${CHUNK_NUMBER}

# Number of steps between particle swaps.
# NOTE: Momentum exchange rate must be smaller than (or equal to) THERMO_OUTPUT.
variable MOMENTUM_EXCHANGE_RATE equal ${THERMO_OUTPUT}


# fix/ave sampling definitions
variable AVERAGE_FREQUENCY  equal ${THERMO_OUTPUT}  # How often an average
                                                    # value is computed.
variable VALUES_IN_AVERAGE  equal 50                # Number of values included
                                                    # in the averaging.
variable STEPS_IN_AVERAGE   equal 2                 # Steps between entries in
                                                    # the average computation.

## Strings
variable POTENTIAL  string "mie/cut"        # Lennard-Jones potential
variable THERMOSTAT string "temp/berendsen" # Berendsen thermostat

# Make a dump of system:
dump    DUMP all custom ${DUMP_STEPS} &
        ${DUMP_FILE} id x y z vx vy vz


### ======================================================================== ###
###                               Define system                              ###
### ======================================================================== ###

# Define atom style
atom_style atomic

# Create a box shaped region with sides 2L_{x,y,x} and center in the origin:
region          REGION block -${LX} ${LX} -${LY} ${LY} -${LZ} ${LZ} units box

create_box      ${ATOM_TYPES} REGION                # Create a box in REGION.
create_atoms    1 random ${N_L} ${RAND_SEED_L} REGION # Fill the box with atoms,
#group           LIGHT region REGION                 # Add all atoms to a group.
create_atoms    2 random ${N_H} ${RAND_SEED_H} REGION # first light, then heavy.
#group           HEAVY subtract all LIGHT            # All atoms not in group
                                                    # LIGHT are heavy.

#set group       LIGHT mass ${MASS_L}                # Give the light atoms mass.
#set group       HEAVY mass ${MASS_H}                # Give the heavy atoms mass.
mass            1 ${MASS_L}
mass            2 ${MASS_H}
velocity        all create ${TEMP} ${RAND_SEED}     # Give the atoms random
                                                    # velocities, distributed
                                                    # around one temperature.

# Define pair interactions:
pair_style  ${POTENTIAL} ${CUTOFF_L}

# Define interaction coefficients:
pair_coeff  1 1 ${EPSILON} ${SIGMA_L} ${MIE_REP} ${MIE_ATT} ${CUTOFF_L}
pair_coeff  2 2 ${EPSILON} ${SIGMA_H} ${MIE_REP} ${MIE_ATT} ${CUTOFF_H}
pair_coeff  1 2 ${EPSILON} ${SIGMA_LH} ${MIE_REP} ${MIE_ATT} ${CUTOFF_LH}
# pair_modify, mix_value
# rdf fra LAMMPS

# Shifts the Mie potensial so that its cutoff is at zero:
pair_modify shift yes #mix arithmetic

# Define timestep
timestep    ${DT}


### ======================================================================== ###
###                             Run simulation                               ###
### ======================================================================== ###

# Minimize system energy to remove atom overlaps:
minimize    ${ETOL} ${FTOL} ${MAXITER} ${MAXEVAL}

# Fix the system in the microcanonical ensemble
fix NVE_FIX all nve
# Fix the temperature with a Berendsen thermostat
fix THERMO_FIX all ${THERMOSTAT} ${TEMP} ${TEMP} ${TDAMP}

# Write out thermodynamic quantities to console:
thermo_style    custom step etotal pe ke temp press vol
thermo          ${THERMO_OUTPUT}

# Run simulation to equillibrate the system.
# This can be swapped with a save-file of a system in equillibrium.
run ${EQUILL_STEPS}


# Viscosity measurement setup, as described by Müller-Plathe:
fix MULLER_PLATHE all viscosity &
    ${MOMENTUM_EXCHANGE_RATE}   &
    x z                         &
    ${CHUNK_NUMBER}             &
    swap ${SWAP_NUMBER}         #vtarget ${V_TARGET}

# Compute chunk velocity.
compute LAYERS all chunk/atom   &
    bin/3d                      &
    z lower ${CHUNK_THICKNESS}  &
    x lower ${CHUNK_WIDTH}      &
    y lower ${CHUNK_WIDTH}      &
    units reduced

# Calculate average chunk velocity, for later analysis in Python.
fix VEL_PROFILE_FIX all ave/chunk   &
    ${STEPS_IN_AVERAGE}             &
    ${VALUES_IN_AVERAGE}            &
    ${AVERAGE_FREQUENCY}            &
    LAYERS                          &
    vx                              &
    file ${FIX_FILE}


## Does this append to the same log file or does it overwrite it?
# Write out thermodynamic quantities to console:
thermo_style    custom step etotal pe ke temp press vol f_MULLER_PLATHE
thermo          ${THERMO_OUTPUT}

# Run simulation
run         ${RUN_STEPS}
